# OpenSim document version 40000
Model XSensStyleModel:
  gravity: 0 0 -9.80665
  length_units: meters
  force_units: N
  Ground
  BodySet:
    Body Pelvis: mass=6.032 [kg] mass_center=(0 0 0) inertia=(0.044245 0.017009 0.050738 0 0 0) meshes=box.vtp
    Body Abdomenf1: mass=0 mass_center=(0 0 0) inertia=(0 0 0 0 0 0)
    Body Abdomenf2: mass=0 mass_center=(0 0 0) inertia=(0 0 0 0 0 0)
    Body Abdomen: mass=7.6908 mass_center=(0 0 0) inertia=(0.26136 0.020203 0.0359 0 0 0) meshes=box.vtp
    Body Chest: mass=7.6908 mass_center=(0 0 0) inertia=(0.025174 0.019241 0.0359 0 0 0) meshes=box.vtp
    Body Sternum: mass=7.6908 mass_center=(0 0 0) inertia=(0.025174 0.019241 0.0359 0 0 0) meshes=box.vtp
    Body Sternum_f1: mass=0 inertia=(0 0 0 0 0 0)
    Body RightClavicle: mass=2.262 mass_center=(0 0 0) inertia=(0.019063 0.0013033 0.019063 0 0 0) meshes=cylinder.vtp
    Body RightUpperArm_f1: mass=0 inertia=(0 0 0 0 0 0)
    Body RightUpperArm_f2: mass=0 inertia=(0 0 0 0 0 0)
    Body RightUpperArm: mass=2.262 mass_center=(0 0 0) inertia=(0.019063 0.0013033 0.019063 0 0 0) meshes=cylinder.vtp
    Body RightForeArm_f1: mass=0 inertia=(0 0 0 0 0 0)
    Body RightForeArm: mass=1.508 mass_center=(0 0 0) inertia=(0.0084595 0.00038616 0.0084595 0 0 0)
        meshes=cylinder.vtp
    Body Sternum_f2: mass=0 inertia=(0 0 0 0 0 0)
    Body LeftClavicle: mass=2.262 mass_center=(0 0 0) inertia=(0.019063 0.0013033 0.019063 0 0 0) meshes=cylinder.vtp
    Body LeftUpperArm_f1: mass=0 inertia=(0 0 0 0 0 0)
    Body LeftUpperArm_f2: mass=0 inertia=(0 0 0 0 0 0)
    Body LeftUpperArm: mass=2.262 mass_center=(0 0 0) inertia=(0.019063 0.0013033 0.019063 0 0 0) meshes=cylinder.vtp
    Body LeftForeArm_f1: mass=0 inertia=(0 0 0 0 0 0)
    Body LeftForeArm: mass=1.508 mass_center=(0 0 0) inertia=(0.0084595 0.00038616 0.0084595 0 0 0) meshes=cylinder.vtp
    Body imu_pelvis_fl: mass=0 mass_center=(0 0 0) inertia=(0 0 0 0 0 0) meshes=box.vtp
      PhysicalOffsetFrame imu_pelvis_fl_imu: socket_parent=.. translation=(0 0 0) [meters]
          orientation=(0.006778943 0.03820593 1.56986) [radians]
        Brick imu_pelvis_fl_imu_geom_1: half_lengths=(0.023 0.015 0.006)
    Body imu_chest_fl: mass=0 mass_center=(0 0 0) inertia=(0 0 0 0 0 0) meshes=box.vtp
      PhysicalOffsetFrame imu_chest_fl_imu: socket_parent=.. translation=(0 0 0)
          orientation=(-3.073058 1.438751 -1.583585)
        Brick imu_chest_fl_imu_geom_1: half_lengths=(0.023 0.015 0.006)
    Body imu_upperarm_fl: mass=0 mass_center=(0 0 0) inertia=(0 0 0 0 0 0) meshes=box.vtp
      PhysicalOffsetFrame imu_upperarm_fl_imu: socket_parent=.. translation=(0 0 0)
          orientation=(-0.03644077 -0.2362539 1.5634)
        Brick imu_upperarm_fl_imu_geom_1: half_lengths=(0.023 0.015 0.006)
    Body imu_forearm_fl: mass=0 mass_center=(0 0 0) inertia=(0 0 0 0 0 0) meshes=box.vtp
      PhysicalOffsetFrame imu_forearm_fl_imu: socket_parent=.. translation=(0 0 0)
          orientation=(-0.06319007 -0.006813712 1.568884)
        Brick imu_forearm_fl_imu_geom_1: half_lengths=(0.023 0.015 0.006)
    Body imu_clavicle_fl: mass=0 mass_center=(0 0 0) inertia=(0 0 0 0 0 0) meshes=box.vtp
      PhysicalOffsetFrame imu_clavicle_fl_imu: socket_parent=.. translation=(0 0 0)
          orientation=(-0.2066381 -1.040869 1.576223)
        Brick imu_clavicle_fl_imu_geom_1: half_lengths=(0.023 0.015 0.006)
  JointSet:
    CustomJoint jGroundBase: socket_parent_frame=ground_offset socket_child_frame=Pelvis_offset
      Coordinate jGroundBase_rz: default_value=0 range=(-3.14 3.14) clamped=true
      Coordinate jGroundBase_rx: default_value=-1.570796 range=(-3.14 3.14) clamped=true
      Coordinate jGroundBase_ry: default_value=0 range=(-3.14 3.14) clamped=true
      Coordinate jGroundBase_tx: default_value=0 range=(-Inf Inf) clamped=true locked=true
      Coordinate jGroundBase_ty: default_value=0 range=(-Inf Inf) clamped=true locked=true
      Coordinate jGroundBase_tz: default_value=0.81 range=(-Inf Inf) clamped=true locked=true
      PhysicalOffsetFrame ground_offset: socket_parent=/ground translation=(0 0 0)
      PhysicalOffsetFrame Pelvis_offset: socket_parent=/bodyset/Pelvis translation=(0 0 0)
      SpatialTransform:
        TransformAxis rotation1: coordinates=jGroundBase_rz axis=(0 0 1) LinearFunction(coefficients=1 0)
        TransformAxis rotation2: coordinates=jGroundBase_rx axis=(1 0 0) LinearFunction(coefficients=1 0)
        TransformAxis rotation3: coordinates=jGroundBase_ry axis=(0 1 0) LinearFunction(coefficients=1 0)
        TransformAxis translation1: coordinates=jGroundBase_tx axis=(1 0 0) LinearFunction(coefficients=1 0)
        TransformAxis translation2: coordinates=jGroundBase_ty axis=(0 1 0) LinearFunction(coefficients=1 0)
        TransformAxis translation3: coordinates=jGroundBase_tz axis=(0 0 1) LinearFunction(coefficients=1 0)
    CustomJoint Abdomen_rotx: socket_parent_frame=Pelvis_offset socket_child_frame=Abdomenf1_offset
      Coordinate Abdomen_rotx: default_value=0 range=(-1.570796 1.570796) clamped=false
      PhysicalOffsetFrame Pelvis_offset: socket_parent=/bodyset/Pelvis translation=(0 0 0.165)
      PhysicalOffsetFrame Abdomenf1_offset: socket_parent=/bodyset/Abdomenf1 translation=(0 0 0)
      SpatialTransform:
        TransformAxis rotation1: coordinates=Abdomen_rotx axis=(1 0 0) LinearFunction(coefficients=1 0)
        TransformAxis rotation2: axis=(0 1 0)
        TransformAxis rotation3: axis=(0 0 1)
        TransformAxis translation1: axis=(1 0 0)
        TransformAxis translation2: axis=(0 1 0)
        TransformAxis translation3: axis=(0 0 1)
    CustomJoint Abdomen_roty: socket_parent_frame=Abdomenf1_offset socket_child_frame=Abdomenf2_offset
      Coordinate Abdomen_roty: default_value=0 range=(-1.570796 1.570796) clamped=false
      PhysicalOffsetFrame Abdomenf1_offset: socket_parent=/bodyset/Abdomenf1 translation=(0 0 0)
      PhysicalOffsetFrame Abdomenf2_offset: socket_parent=/bodyset/Abdomenf2 translation=(0 0 0)
      SpatialTransform:
        TransformAxis rotation1: axis=(1 0 0)
        TransformAxis rotation2: coordinates=Abdomen_roty axis=(0 1 0) LinearFunction(coefficients=1 0)
        TransformAxis rotation3: axis=(0 0 1)
        TransformAxis translation1: axis=(1 0 0)
        TransformAxis translation2: axis=(0 1 0)
        TransformAxis translation3: axis=(0 0 1)
    CustomJoint Abdomen_rotz: socket_parent_frame=Abdomenf2_offset socket_child_frame=Abdomen_offset
      Coordinate Abdomen_rotz: default_value=0 range=(-1.570796 1.570796) clamped=false
      PhysicalOffsetFrame Abdomenf2_offset: socket_parent=/bodyset/Abdomenf2 translation=(0 0 0)
      PhysicalOffsetFrame Abdomen_offset: socket_parent=/bodyset/Abdomen translation=(0 0 0)
      SpatialTransform:
        TransformAxis rotation1: axis=(1 0 0)
        TransformAxis rotation2: axis=(0 1 0)
        TransformAxis rotation3: coordinates=Abdomen_rotz axis=(0 0 1) LinearFunction(coefficients=1 0)
        TransformAxis translation1: axis=(1 0 0)
        TransformAxis translation2: axis=(0 1 0)
        TransformAxis translation3: axis=(0 0 1)
    WeldJoint jL1T12: socket_parent_frame=Abdomen_offset socket_child_frame=Chest_offset
      PhysicalOffsetFrame Abdomen_offset: socket_parent=/bodyset/Abdomen translation=(0 0 0.29)
      PhysicalOffsetFrame Chest_offset: socket_parent=/bodyset/Chest translation=(0 0 0)
    WeldJoint jL1Sternum: socket_parent_frame=Abdomen_offset socket_child_frame=Sternum_offset
      PhysicalOffsetFrame Abdomen_offset: socket_parent=/bodyset/Abdomen translation=(0 0 0.29)
      PhysicalOffsetFrame Sternum_offset: socket_parent=/bodyset/Sternum translation=(0 0 0)
    CustomJoint jRightClavicle_rotx: socket_parent_frame=Sternum_offset socket_child_frame=Sternum_f1_offset
      Coordinate jRightClavicle_rotx: default_value=0 range=(-1.570796 1.570796) clamped=false
      PhysicalOffsetFrame Sternum_offset: socket_parent=/bodyset/Sternum translation=(0 -0.03 0.1494)
      PhysicalOffsetFrame Sternum_f1_offset: socket_parent=/bodyset/Sternum_f1 translation=(0 0 0)
      SpatialTransform:
        TransformAxis rotation1: coordinates=jRightClavicle_rotx axis=(1 0 0) LinearFunction(coefficients=1 0)
        TransformAxis rotation2: axis=(0 1 0)
        TransformAxis rotation3: axis=(0 0 1)
        TransformAxis translation1: axis=(1 0 0)
        TransformAxis translation2: axis=(0 1 0)
        TransformAxis translation3: axis=(0 0 1)
    CustomJoint jRightClavicle_rotz: socket_parent_frame=Sternum_f1_offset socket_child_frame=RightClavicle_offset
      Coordinate jRightClavicle_rotz: default_value=0 range=(-1.570796 1.570796) clamped=false
      PhysicalOffsetFrame Sternum_f1_offset: socket_parent=/bodyset/Sternum_f1 translation=(0 0 0)
      PhysicalOffsetFrame RightClavicle_offset: socket_parent=/bodyset/RightClavicle translation=(0 0 0)
      SpatialTransform:
        TransformAxis rotation1: axis=(1 0 0)
        TransformAxis rotation2: axis=(0 1 0)
        TransformAxis rotation3: coordinates=jRightClavicle_rotz axis=(0 0 1) LinearFunction(coefficients=1 0)
        TransformAxis translation1: axis=(1 0 0)
        TransformAxis translation2: axis=(0 1 0)
        TransformAxis translation3: axis=(0 0 1)
    CustomJoint jRightShoulder_rotx: socket_parent_frame=RightClavicle_offset
        socket_child_frame=RightUpperArm_f1_offset
      Coordinate jRightShoulder_rotx: default_value=0 range=(-2.5619 1.570796) clamped=false
      PhysicalOffsetFrame RightClavicle_offset: socket_parent=/bodyset/RightClavicle translation=(0 -0.145 0)
      PhysicalOffsetFrame RightUpperArm_f1_offset: socket_parent=/bodyset/RightUpperArm_f1 translation=(0 0 0)
      SpatialTransform:
        TransformAxis rotation1: coordinates=jRightShoulder_rotx axis=(1 0 0) LinearFunction(coefficients=1 0)
        TransformAxis rotation2: axis=(0 1 0)
        TransformAxis rotation3: axis=(0 0 1)
        TransformAxis translation1: axis=(1 0 0)
        TransformAxis translation2: axis=(0 1 0)
        TransformAxis translation3: axis=(0 0 1)
    CustomJoint jRightShoulder_roty: socket_parent_frame=RightUpperArm_f1_offset
        socket_child_frame=RightUpperArm_f2_offset
      Coordinate jRightShoulder_roty: default_value=0 range=(-1.570796 1.570796) clamped=false
      PhysicalOffsetFrame RightUpperArm_f1_offset: socket_parent=/bodyset/RightUpperArm_f1 translation=(0 0 0)
      PhysicalOffsetFrame RightUpperArm_f2_offset: socket_parent=/bodyset/RightUpperArm_f2 translation=(0 0 0)
      SpatialTransform:
        TransformAxis rotation1: axis=(1 0 0)
        TransformAxis rotation2: coordinates=jRightShoulder_roty axis=(0 1 0) LinearFunction(coefficients=1 0)
        TransformAxis rotation3: axis=(0 0 1)
        TransformAxis translation1: axis=(1 0 0)
        TransformAxis translation2: axis=(0 1 0)
        TransformAxis translation3: axis=(0 0 1)
    CustomJoint jRightShoulder_rotz: socket_parent_frame=RightUpperArm_f2_offset
        socket_child_frame=RightUpperArm_offset
      Coordinate jRightShoulder_rotz: default_value=0 range=(-0.785398 3.14159) clamped=false
      PhysicalOffsetFrame RightUpperArm_f2_offset: socket_parent=/bodyset/RightUpperArm_f2 translation=(0 0 0)
      PhysicalOffsetFrame RightUpperArm_offset: socket_parent=/bodyset/RightUpperArm translation=(0 0 0)
      SpatialTransform:
        TransformAxis rotation1: axis=(1 0 0)
        TransformAxis rotation2: axis=(0 1 0)
        TransformAxis rotation3: coordinates=jRightShoulder_rotz axis=(0 0 1) LinearFunction(coefficients=1 0)
        TransformAxis translation1: axis=(1 0 0)
        TransformAxis translation2: axis=(0 1 0)
        TransformAxis translation3: axis=(0 0 1)
    CustomJoint jRightElbow_rotz: socket_parent_frame=RightUpperArm_offset socket_child_frame=RightForeArm_f1_offset
      Coordinate jRightElbow_rotz: default_value=0 range=(0 2.53073) clamped=false
      PhysicalOffsetFrame RightUpperArm_offset: socket_parent=/bodyset/RightUpperArm translation=(0 -0.27 0)
      PhysicalOffsetFrame RightForeArm_f1_offset: socket_parent=/bodyset/RightForeArm_f1 translation=(0 0 0)
      SpatialTransform:
        TransformAxis rotation1: axis=(1 0 0)
        TransformAxis rotation2: axis=(0 1 0)
        TransformAxis rotation3: coordinates=jRightElbow_rotz axis=(0 0 1) LinearFunction(coefficients=1 0)
        TransformAxis translation1: axis=(1 0 0)
        TransformAxis translation2: axis=(0 1 0)
        TransformAxis translation3: axis=(0 0 1)
    CustomJoint jRightElbow_roty: socket_parent_frame=RightForeArm_f1_offset socket_child_frame=RightForeArm_offset
      Coordinate jRightElbow_roty: default_value=0 range=(-1.57 1.57) clamped=false
      PhysicalOffsetFrame RightForeArm_f1_offset: socket_parent=/bodyset/RightForeArm_f1 translation=(0 0 0)
      PhysicalOffsetFrame RightForeArm_offset: socket_parent=/bodyset/RightForeArm translation=(0 0 0)
      SpatialTransform:
        TransformAxis rotation1: axis=(1 0 0)
        TransformAxis rotation2: coordinates=jRightElbow_roty axis=(0 1 0) LinearFunction(coefficients=1 0)
        TransformAxis rotation3: axis=(0 0 1)
        TransformAxis translation1: axis=(1 0 0)
        TransformAxis translation2: axis=(0 1 0)
        TransformAxis translation3: axis=(0 0 1)
    CustomJoint jLeftClavicle_rotx: socket_parent_frame=Sternum_offset socket_child_frame=Sternum_f2_offset
      Coordinate jLeftClavicle_rotx: default_value=0 range=(-1.570796 1.570796) clamped=false
      PhysicalOffsetFrame Sternum_offset: socket_parent=/bodyset/Sternum translation=(0 0.03 0.1494)
      PhysicalOffsetFrame Sternum_f2_offset: socket_parent=/bodyset/Sternum_f2 translation=(0 0 0)
      SpatialTransform:
        TransformAxis rotation1: coordinates=jLeftClavicle_rotx axis=(1 0 0) LinearFunction(coefficients=1 0)
        TransformAxis rotation2: axis=(0 1 0)
        TransformAxis rotation3: axis=(0 0 1)
        TransformAxis translation1: axis=(1 0 0)
        TransformAxis translation2: axis=(0 1 0)
        TransformAxis translation3: axis=(0 0 1)
    CustomJoint jLeftClavicle_rotz: socket_parent_frame=Sternum_f2_offset socket_child_frame=LeftClavicle_offset
      Coordinate jLeftClavicle_rotz: default_value=0 range=(-1.570796 1.570796) clamped=false
      PhysicalOffsetFrame Sternum_f2_offset: socket_parent=/bodyset/Sternum_f2 translation=(0 0 0)
      PhysicalOffsetFrame LeftClavicle_offset: socket_parent=/bodyset/LeftClavicle translation=(0 0 0)
      SpatialTransform:
        TransformAxis rotation1: axis=(1 0 0)
        TransformAxis rotation2: axis=(0 1 0)
        TransformAxis rotation3: coordinates=jLeftClavicle_rotz axis=(0 0 1) LinearFunction(coefficients=1 0)
        TransformAxis translation1: axis=(1 0 0)
        TransformAxis translation2: axis=(0 1 0)
        TransformAxis translation3: axis=(0 0 1)
    CustomJoint jLeftShoulder_rotx: socket_parent_frame=LeftClavicle_offset socket_child_frame=LeftUpperArm_f1_offset
      Coordinate jLeftShoulder_rotx: default_value=0 range=(-1.570796 2.5619) clamped=false
      PhysicalOffsetFrame LeftClavicle_offset: socket_parent=/bodyset/LeftClavicle translation=(0 0.145 0)
      PhysicalOffsetFrame LeftUpperArm_f1_offset: socket_parent=/bodyset/LeftUpperArm_f1 translation=(0 0 0)
      SpatialTransform:
        TransformAxis rotation1: coordinates=jLeftShoulder_rotx axis=(1 0 0) LinearFunction(coefficients=1 0)
        TransformAxis rotation2: axis=(0 1 0)
        TransformAxis rotation3: axis=(0 0 1)
        TransformAxis translation1: axis=(1 0 0)
        TransformAxis translation2: axis=(0 1 0)
        TransformAxis translation3: axis=(0 0 1)
    CustomJoint jLeftShoulder_roty: socket_parent_frame=LeftUpperArm_f1_offset
        socket_child_frame=LeftUpperArm_f2_offset
      Coordinate jLeftShoulder_roty: default_value=0 range=(-1.570796 1.570796) clamped=false
      PhysicalOffsetFrame LeftUpperArm_f1_offset: socket_parent=/bodyset/LeftUpperArm_f1 translation=(0 0 0)
      PhysicalOffsetFrame LeftUpperArm_f2_offset: socket_parent=/bodyset/LeftUpperArm_f2 translation=(0 0 0)
      SpatialTransform:
        TransformAxis rotation1: axis=(1 0 0)
        TransformAxis rotation2: coordinates=jLeftShoulder_roty axis=(0 1 0) LinearFunction(coefficients=1 0)
        TransformAxis rotation3: axis=(0 0 1)
        TransformAxis translation1: axis=(1 0 0)
        TransformAxis translation2: axis=(0 1 0)
        TransformAxis translation3: axis=(0 0 1)
    CustomJoint jLeftShoulder_rotz: socket_parent_frame=LeftUpperArm_f2_offset socket_child_frame=LeftUpperArm_offset
      Coordinate jLeftShoulder_rotz: default_value=0 range=(-3.14159 0.785398) clamped=false
      PhysicalOffsetFrame LeftUpperArm_f2_offset: socket_parent=/bodyset/LeftUpperArm_f2 translation=(0 0 0)
      PhysicalOffsetFrame LeftUpperArm_offset: socket_parent=/bodyset/LeftUpperArm translation=(0 0 0)
      SpatialTransform:
        TransformAxis rotation1: axis=(1 0 0)
        TransformAxis rotation2: axis=(0 1 0)
        TransformAxis rotation3: coordinates=jLeftShoulder_rotz axis=(0 0 1) LinearFunction(coefficients=1 0)
        TransformAxis translation1: axis=(1 0 0)
        TransformAxis translation2: axis=(0 1 0)
        TransformAxis translation3: axis=(0 0 1)
    CustomJoint jLeftElbow_rotz: socket_parent_frame=LeftUpperArm_offset socket_child_frame=LeftForeArm_f1_offset
      Coordinate jLeftElbow_rotz: default_value=0 range=(-2.53073 0) clamped=false
      PhysicalOffsetFrame LeftUpperArm_offset: socket_parent=/bodyset/LeftUpperArm translation=(0 0.27 0)
      PhysicalOffsetFrame LeftForeArm_f1_offset: socket_parent=/bodyset/LeftForeArm_f1 translation=(0 0 0)
      SpatialTransform:
        TransformAxis rotation1: axis=(1 0 0)
        TransformAxis rotation2: axis=(0 1 0)
        TransformAxis rotation3: coordinates=jLeftElbow_rotz axis=(0 0 1) LinearFunction(coefficients=1 0)
        TransformAxis translation1: axis=(1 0 0)
        TransformAxis translation2: axis=(0 1 0)
        TransformAxis translation3: axis=(0 0 1)
    CustomJoint jLeftElbow_roty: socket_parent_frame=LeftForeArm_f1_offset socket_child_frame=LeftForeArm_offset
      Coordinate jLeftElbow_roty: default_value=0 range=(-1.57 1.57) clamped=false
      PhysicalOffsetFrame LeftForeArm_f1_offset: socket_parent=/bodyset/LeftForeArm_f1 translation=(0 0 0)
      PhysicalOffsetFrame LeftForeArm_offset: socket_parent=/bodyset/LeftForeArm translation=(0 0 0)
      SpatialTransform:
        TransformAxis rotation1: axis=(1 0 0)
        TransformAxis rotation2: coordinates=jLeftElbow_roty axis=(0 1 0) LinearFunction(coefficients=1 0)
        TransformAxis rotation3: axis=(0 0 1)
        TransformAxis translation1: axis=(1 0 0)
        TransformAxis translation2: axis=(0 1 0)
        TransformAxis translation3: axis=(0 0 1)
    WeldJoint imu_pelvis_fl_j: socket_parent_frame=Pelvis_offset socket_child_frame=imu_pelvis_fl_offset
      PhysicalOffsetFrame Pelvis_offset: socket_parent=/bodyset/Pelvis translation=(-0.118813 0 0.142003)
      PhysicalOffsetFrame imu_pelvis_fl_offset: socket_parent=/bodyset/imu_pelvis_fl translation=(0 0 0)
    WeldJoint imu_chest_fl_j: socket_parent_frame=Chest_offset socket_child_frame=imu_chest_fl_offset
      PhysicalOffsetFrame Chest_offset: socket_parent=/bodyset/Chest translation=(0.115 0 0)
      PhysicalOffsetFrame imu_chest_fl_offset: socket_parent=/bodyset/imu_chest_fl translation=(0 0 0)
    WeldJoint imu_upperarm_fl_j: socket_parent_frame=RightUpperArm_offset socket_child_frame=imu_upperarm_fl_offset
      PhysicalOffsetFrame RightUpperArm_offset: socket_parent=/bodyset/RightUpperArm translation=(0 -0.125 0.0406)
      PhysicalOffsetFrame imu_upperarm_fl_offset: socket_parent=/bodyset/imu_upperarm_fl translation=(0 0 0)
    WeldJoint imu_forearm_fl_j: socket_parent_frame=RightForeArm_offset socket_child_frame=imu_forearm_fl_offset
      PhysicalOffsetFrame RightForeArm_offset: socket_parent=/bodyset/RightForeArm translation=(0 -0.195 0.0334)
      PhysicalOffsetFrame imu_forearm_fl_offset: socket_parent=/bodyset/imu_forearm_fl translation=(0 0 0)
    WeldJoint imu_clavicle_fl_j: socket_parent_frame=RightClavicle_offset socket_child_frame=imu_clavicle_fl_offset
      PhysicalOffsetFrame RightClavicle_offset: socket_parent=/bodyset/RightClavicle translation=(-0.05 -0.1 0)
      PhysicalOffsetFrame imu_clavicle_fl_offset: socket_parent=/bodyset/imu_clavicle_fl translation=(0 0 0)
  MarkerSet:
    Marker RightHand: RightForeArm (0 -0.405 0) fixed=true
